// COMSOL Multiphysics 5.6.0.341 model "valdation_model.mph"
// Outline of the model tree

Parameters
  A = 0.00000000000972 [m/(s*Pa)]  // water permeability
  rho = 1000[kg/m^3]  // density
  mio = 0.001[ Pa*s]  // viscosity
  c0 = 34 [mol/m^3]  // feed concentration
  Dsw = 1.5e-9[m^2/s]  // solute diffusion coefficient in watre
  p0 = 0e3[Pa]  // outlet pressure
  u0 = 0.095172[m/s]  // inlet velocity
  R = 0.995  // rejection factor
  Pp = 1[bar]
  Pi = 805e5[Pa]
  Wf = 0.002
  Wp = Wf*(1-R)
  Mo = 59[g/mol]
  ze = Mo/(rho)
  Cp = c0*0.005
  a = c0*ze

Variables
  var3 "Variables 2" on domains 1
    Jw = A*((p-Pp)-(Pi*((c*ze)-Wp)))
    Js = Cp*Jw

Geometry
  geom2 "Geometry 2" (2D, length unit mm)
    r1: Rectangle | size = {260, 2.5}
    fin: Finalize "Form Union"

Physics
  spf2: LaminarFlow on all domains
    dependent variable u = {u, v, w}
    fp1: FluidProperties (default)
      MixingLengthLimit = Automatic
      l_mix_lim = 1
      LengthScaleSpecification = Automatic
      lref = 1
      rho = rho
      Constitutiverelation = Newtonian
      mu = mio
      nonNewtonianModels = PowerLaw
      sr_lowlimit = 0.01[1/s]
      sr_ref = 1[1/s]
      m_p = 10[s]
      mu_init_app = spf2.mu0
      kf = 1[1/s]
      kb = 1[1/s]
      m_y0 = 1e-3[Pa*s]
      m_yt = 0[Pa*s]
      tau_y0 = 0[N/m^2]
      tau_yt = 0[N/m^2]
      nb = 1
      nf = 1
      Twlf = 293.15[K]
      C1wlf = 8.86
      C2wlf = 51.6[K]
      T0 = 293.15[K]
      alphaT = 1
      shift_temperature = spf2.Tref
    init1: init "Initial Values 1" (default)
      nutilde_init = spf2.nutildeinit
      G_init = spf2.G0
      k_init = spf2.kinit
      ep_init = spf2.epinit
      om_init = spf2.omInit
      yPlus_init = spf2.yPlusinit
      uPlus_init = spf2.uPlusinit
      zeta_init = 2/3
      alpha_init = 1
      CompensateForHydrostaticPressureApproximationIO = 1
      CompensateForHydrostaticPressureIO = 1
      CompensateForHydrostaticPressureApproximation = 1
      CompensateForHydrostaticPressure = 1
    wallbc1: WallBC "Wall 1" (default)
      BoundaryCondition = NoSlip
      mueo = 7e-8[m^2/(V*s)]
      zeta = (-0.1)[V]
      epsilonr = 80
      Ls = 1e-7[m]
      alphav = 0.9
      lambda = 1e-6[m]
      sigmat = 0.75
      T = 293.15[K]
      TranslationalVelocityOption = AutomaticFromFrame
      constraintType = unidirectionalConstraint
      weakConstraints = 1
      constraintMethod = elemental
      RoughnessModel = SandRoughness
      kseq = 3.2[um]
      ks = 3.2[um]
      Cs = 0.26
      NavierSlip = hmin
      beta = 1[mm]
      beta_factor = 0.5
      tau_ref = 1[N/m^2]
      m = 1
      tau_y = 1[N/m^2]
      k1 = 1[m/s]
      k2 = 1[1/Pa]
    inl1: InletBoundary "Inlet 1" on boundaries 1 | BoundaryCondition = FullyDevelopedFlow; Uavfdf = u0
    out1: OutletBoundary "Outlet 1" on boundaries 4 | BoundaryCondition = Pressure; weakConstraints = 1
    wallbc3: WallBC "Wall 3" on boundaries 2 | BoundaryCondition = LeakingWall; uleak = {0, -Jw, 0}
    prpc1: PressurePointConstraint (disabled) on points 3, 4 | p0 = p0-500; weakConstraints = 1
  tds2: DilutedSpecies "Transport of Diluted Species" on all domains
    dependent variable c
    AdvancedSettings.ConvectiveTerm = cons
    cdm1: ConvectionDiffusionMigration "Transport Properties 1" (default)
      DiffusionCoefficientSource = mat
      DH = 9.3e-9[m^2/s]
      DOH = 5.3e-9[m^2/s]
      um = 1e-13[s*mol/kg]
      umH = 1e-13[s*mol/kg]
      umOH = 1e-13[s*mol/kg]
      MobilityModel = NernstEinstein
      D_c = 1.5e-9[m^2/s]
      Dchem_c = 1e-9[m^2/s]
    nflx1: NoFlux (default)
    init1: init "Initial Values 1" (default)
    fl1: FluxBoundary "Flux 1" on boundaries 2 | IncludeConvection = 1; J0 = -Js
    in1: Inflow on boundaries 1
    out1: Outflow on boundaries 4

Multiphysics
  rfd2: ReactingFlowDS "Reacting Flow, Diluted Species 2" on all domains | Fluid_physics = spf2; Species_physics = tds2

Mesh
  mesh2 "Mesh 2"
    size: MeshSizeDefault | hauto = 6
    bl2: BndLayer "Boundary Layers 2" on entire geometry
      blp: BndLayerProp "Boundary Layer Properties" on boundaries 2 | inittype = blhmin; blhmin = 0.01
    bl3: BndLayer "Boundary Layers 3" on entire geometry
      blp: BndLayerProp "Boundary Layer Properties" on boundaries 3 | blnlayers = 6; inittype = blhmin

Studies
  std6 "Study 1"
    param1: Parametric "K1_898KP"
      pname = {u0, A, p0}
      plistarr = {0.013854167 0.029357639 0.044201389 0.04453125 0.052118056 0.059375 0.082135417 0.112482639, 6.93E-12 6.60E-12 7.26E-12, 898.7e3}
      punit = {m/s, m^2*s/kg, Pa}
    stat: Stationary
  std3 "Study 3"
    param1: Parametric "K1_1098.7kp"
      pname = {u0, A, p0}
      plistarr = {0.033024003 0.044679703 0.050777382 0.056871919 0.080217245 0.083259802 0.086558051, 6.93E-12 6.60E-12 7.26E-12, 1098.7e3}
      punit = {m/s, m^2*s/kg, Pa}
    stat: Stationary
  std4 "Study 4"
    param1: Parametric "K2_1098.7kp"
      pname = {u0, A, p0}
      plistarr = {0.114934935 0.12103387 0.16547166 0.192060579 0.167206225 0.198167681, 9.72E-12 8.95E-12 1.05E-11, 1098.7e3}
      punit = {m/s, m^2*s/kg, Pa}
    stat: Stationary
  std5 "Study 5"
    param1: Parametric "K2_1298kp"
      pname = {u0, A, p0}
      plistarr = {0.095172414 0.127758621 0.141034483 0.153793103 0.166551724 0.167241379 0.185689655, 9.72E-12 8.95E-12 1.05E-11, 1298.7e3}
      punit = {m/s, m^2*s/kg, Pa}
    stat: Stationary
  std7 "Study 7"
    param: Parametric "K2_898"
      sweeptype = filled
      pname = {u0, A, p0}
      plistarr = {0.143819444 0.159982639 0.185052083 0.19296875 0.210121528 0.217708333 0.226284722 0.225295139, 9.72E-12 8.95E-12 1.05E-11, 898.7e3}
      punit = {m/s, m^2*s/kg, Pa}
    stat: Stationary

Solver configurations
  sol9 "Solution 9" (study std6)
    v1: Variables "Dependent Variables 1"
    s1: Stationary "Stationary Solver 1"
      p1: Parametric
        sweeptype = filled
        pname = {u0, A, p0}
        plistarr = {0.013854167 0.029357639 0.044201389 0.04453125 0.052118056 0.059375 0.082135417 0.112482639, 6.93E-12 6.60E-12 7.26E-12, 898.7e3}
        punit = {m/s, m^2*s/kg, Pa}
        pcontinuationmode = no
      dDef: Direct | linsolver = pardiso
      fc1: FullyCoupled
  sol10 "Solution 10" (study std3)
    v1: Variables "Dependent Variables 1"
    s1: Stationary "Stationary Solver 1"
      p1: Parametric
        sweeptype = filled
        pname = {u0, A, p0}
        plistarr = {0.033024003 0.044679703 0.050777382 0.056871919 0.080217245 0.083259802 0.086558051, 6.93E-12 6.60E-12 7.26E-12, 1098.7e3}
        punit = {m/s, m^2*s/kg, Pa}
        pcontinuationmode = no
      dDef: Direct | linsolver = pardiso
      fc2: FullyCoupled
  sol11 "Solution 11" (study std4)
    v1: Variables "Dependent Variables 1"
    s1: Stationary "Stationary Solver 1"
      p1: Parametric
        sweeptype = filled
        pname = {u0, A, p0}
        plistarr = {0.114934935 0.12103387 0.16547166 0.192060579 0.167206225 0.198167681, 9.72E-12 8.95E-12 1.05E-11, 1098.7e3}
        punit = {m/s, m^2*s/kg, Pa}
        pcontinuationmode = no
      d2: Direct "Direct, concentrations (tds2)" | linsolver = pardiso; pivotperturb = 1.0E-13
      fc1: FullyCoupled
  sol12 "Solution 12" (study std5)
    v1: Variables "Dependent Variables 1"
    s1: Stationary "Stationary Solver 1"
      p1: Parametric
        sweeptype = filled
        pname = {u0, A, p0}
        plistarr = {0.095172414 0.127758621 0.141034483 0.153793103 0.166551724 0.167241379 0.185689655, 9.72E-12 8.95E-12 1.05E-11, 1298.7e3}
        punit = {m/s, m^2*s/kg, Pa}
        pcontinuationmode = no
      dDef: Direct
      fc1: FullyCoupled
  sol13 "Solution 13" (study std7)
    v1: Variables "Dependent Variables 1"
    s1: Stationary "Stationary Solver 1"
      p1: Parametric
        sweeptype = filled
        pname = {u0, A, p0}
        plistarr = {0.143819444 0.159982639 0.185052083 0.19296875 0.210121528 0.217708333 0.226284722 0.225295139, 9.72E-12 8.95E-12 1.05E-11, 898.7e3}
        punit = {m/s, m^2*s/kg, Pa}
        pcontinuationmode = no
      dDef: Direct | linsolver = pardiso
      fc1: FullyCoupled

Datasets
  dset1: Solution | solution = sol9
  dset3: Solution | solution = sol10
  dset5: Solution | solution = sol11
  dset6: Solution | solution = sol12
  dset7: Solution | solution = sol13

Derived values
  int1: IntLine "Line Integration 1" on boundaries 2 | data = dset6; table = tbl7; expr = Jw

Tables
  tbl3: Table
    // Line Integration 1
    u0 (m/s) | A (m^2*s/kg) | p0 (Pa) | Jw (m^2/s)
    0.0138542 | 6.93e-12 | 898700 | 1.08112e-06
    0.0138542 | 6.6e-12 | 898700 | 1.03463e-06
    0.0138542 | 7.26e-12 | 898700 | 1.11939e-06
    0.0293576 | 6.93e-12 | 898700 | 1.12569e-06
    0.0293576 | 6.6e-12 | 898700 | 1.08163e-06
    0.0293576 | 7.26e-12 | 898700 | 1.1691e-06
    0.0442014 | 6.93e-12 | 898700 | 1.15144e-06
    0.0442014 | 6.6e-12 | 898700 | 1.10512e-06
    0.0442014 | 7.26e-12 | 898700 | 1.19697e-06
    0.0445313 | 6.93e-12 | 898700 | 1.15185e-06
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  tbl7: Table
    // Line Integration 1
    u0 (m/s) | A (m^2*s/kg) | p0 (Pa) | Jw (m^2/s)
    0.0951724 | 9.72e-12 | 1.2987e+06 | 2.18907e-06
    0.0951724 | 8.95e-12 | 1.2987e+06 | 2.04894e-06
    0.0951724 | 1.05e-11 | 1.2987e+06 | 2.32326e-06
    0.127759 | 9.72e-12 | 1.2987e+06 | 2.23368e-06
    0.127759 | 8.95e-12 | 1.2987e+06 | 2.08818e-06
    0.127759 | 1.05e-11 | 1.2987e+06 | 2.37572e-06
    0.141034 | 9.72e-12 | 1.2987e+06 | 2.24854e-06
    0.141034 | 8.95e-12 | 1.2987e+06 | 2.10082e-06
    0.141034 | 1.05e-11 | 1.2987e+06 | 2.39284e-06
    0.153793 | 9.72e-12 | 1.2987e+06 | 2.26107e-06
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